<?xml version="1.0"?>

<!-- Copyright (C) 2024 Kweku Adu (Captain Jake) -->
<fdm_config name="A350-900-RR" version="2.0" release="BETA">
    <fileheader>
        <author>Kweku Adu (Captain Jake)</author>
        <description>A350-900 with Trent WXB Engines</description>
    </fileheader>

    <aerodynamics file="FDE/Config/a350-aerodynamics.xml"/>
    <external_reactions file="FDE/Config/a350-external-reactions"/>

    <flight_control name="FCS: A350">
        <channel name="Pitch">

            <summer name="Pitch Trim Sum">
                <input>fcs/elevator-cmd-norm</input>
                <input>fcs/pitch-trim-cmd-norm</input>
                <clipto>
                    <min>-1</min>
                    <max>1</max>
                </clipto>
            </summer>

            <aerosurface_scale name="Elevator Control">
                <input>fcs/pitch-trim-sum</input>
                <gain>0.018</gain>
                <range>
                    <min>-30</min>
                    <max>15</max>
                </range>
                <output>fcs/elevator-pos-rad</output>
            </aerosurface_scale>

            <aerosurface_scale name="Elevator position normalized">
                <input>fcs/elevator-pos-deg</input>
                <domain>
                    <min>-30</min>
                    <max>15</max>
                </domain>
                <range>
                    <min>-1</min>
                    <max>1</max>
                </range>
                <output>fcs/elevator-pos-norm</output>
            </aerosurface_scale>
        </channel>

        <channel name="Roll">
            <summer name="Roll Trim Sum">
                <input>fcs/aileron-cmd-norm</input>
                <input>fcs/roll-trim-cmd-norm</input>
                <clipto>
                    <min>-1</min>
                    <max>1</max>
                </clipto>
            </summer>

            <aerosurface_scale name="Left Aileron Control">
                <input>fcs/roll-trim-sum</input>
                <gain>0.02</gain>
                <range>
                    <min>-25</min>
                    <max>25</max>
                </range>
                <output>fcs/left-aileron-pos-rad</output>
            </aerosurface_scale>

            <aerosurface_scale name="Right Aileron Control">
                <input>-fcs/roll-trim-sum</input>
                <gain>0.02</gain>
                <range>
                    <min>-25</min>
                    <max>25</max>
                </range>
                <output>fcs/right-aileron-pos-rad</output>
            </aerosurface_scale>

            <aerosurface_scale name="Left Aileron position normalized">
                <input>fcs/left-aileron-pos-deg</input>
                <domain>
                    <min>-25</min>
                    <max>25</max>
                </domain>
                <range>
                    <min>-0.75</min>
                    <max>1</max>
                </range>
                <output>fcs/left-aileron-pos-norm</output>
            </aerosurface_scale>

            <aerosurface_scale name="Right Aileron position normalized">
                <input>fcs/right-aileron-pos-deg</input>
                <domain>
                    <min>-25</min>
                    <max>25</max>
                </domain>
                <range>
                    <min>-0.75</min>
                    <max>1</max>
                </range>
                <output>fcs/right-aileron-pos-norm</output>
            </aerosurface_scale>
        </channel>

        <channel name="Yaw">
            <summer name="Rudder Command Sum">
                <input>fcs/rudder-cmd-norm</input>
                <input>fcs/yaw-trim-cmd-norm</input>
                <clipto>
                    <min> -0.35 </min>
                    <max>  0.35 </max>
                </clipto>
            </summer>

            <scheduled_gain name="Yaw Damper Rate">
                <input>velocities/r-aero-rad_sec</input>
                <table>
                    <independentVar lookup="row">velocities/ve-kts</independentVar>
                    <tableData>
                        30     0.00
                        60     2.00
                    </tableData>
                </table>
            </scheduled_gain>

            <scheduled_gain name="Yaw Damper Beta">
                <input>aero/beta-rad</input>
                <table>
                    <independentVar lookup="row">velocities/ve-kts</independentVar>
                    <tableData>
                    30     0.00
                    60     0.00
                    </tableData>
                </table>
            </scheduled_gain>

            <summer name="Yaw Damper Sum">
                <input>fcs/yaw-damper-beta</input>
                <input>fcs/yaw-damper-rate</input>
                <clipto>
                    <min> -0.1 </min>
                    <max>  0.1 </max>
                </clipto>
            </summer>

            <scheduled_gain name="Yaw Damper Final">
                <input>fcs/yaw-damper-sum</input>
                <table>
                    <independentVar lookup="row">velocities/ve-kts</independentVar>
                    <tableData>
                    30         0.0
                    31         1.0
                    </tableData>
                </table>
            </scheduled_gain>

            <summer name="Rudder Sum">
                <input>fcs/rudder-command-sum</input>
                <input>fcs/yaw-damper-final</input>
                <clipto>
                    <min> -1 </min>
                    <max>  1 </max>
                </clipto>
            </summer>

            <aerosurface_scale name="Rudder Control">
                <input>fcs/rudder-sum</input>
                <range>
                    <min> -0.35 </min>
                    <max>  0.35 </max>
                </range>
                <output>fcs/rudder-pos-rad</output>
            </aerosurface_scale>

            <aerosurface_scale name="rudder normalization">
                <input>fcs/rudder-pos-rad</input>
                <domain>
                    <min> -0.35 </min>
                    <max>  0.35 </max>
                </domain>
                <range>
                    <min> -1 </min>
                    <max>  1 </max>
                </range>
                <output>fcs/rudder-pos-norm</output>
            </aerosurface_scale>
        </channel>

        <channel name="Flaps">
            <kinematic name="Flaps Control">
                <input>fcs/flap-cmd-norm</input>
                <traverse>
                    <setting>
                        <position>0</position>
                        <time>0</time>
                    </setting>
                    <setting>
                        <position>40</position>
                        <time>40</time>
                    </setting>
                </traverse>
                <output>fcs/flap-pos-deg</output>
            </kinematic>

            <aerosurface_scale name="Flap position normalized">
                <input>fcs/flap-pos-deg</input>
                <domain>
                    <min>0</min>
                    <max>40</max>
                </domain>
                <range>
                    <min>0</min>
                    <max>1</max>
                </range>
                <output>fcs/flap-pos-norm</output>
            </aerosurface_scale>
        </channel>

        <channel name="Landing Gear">
            <kinematic name="Gear Control">
                <input>gear/gear-cmd-norm</input>
                <traverse>
                    <setting>
                        <position>0</position>
                        <time>0</time>
                    </setting>
                    <setting>
                        <position>1</position>
                        <time>10</time>
                    </setting>
                </traverse>
                <output>gear/gear-pos-norm</output>
            </kinematic>
        </channel>

        <channel name="Speedbrake">
            <kinematic name="Speedbrake">
                <input>fcs/speedbrake-cmd-norm</input>
                <traverse>
                    <setting>
                        <position>0</position>
                        <time>0</time>
                    </setting>
                    <setting>
                        <position>1</position>
                        <time>2</time>
                    </setting>
                </traverse>
                <output>fcs/speedbrake-pos-norm</output>
            </kinematic>
        </channel>
    </flight_control>

    <ground_reactions file="FDE/Config/a350-ground-reactions"/>
    <mass_balance file="FDE/Config/a350-mass-balance"/>
    <metrics file="FDE/Config/a350-metrics"/>

    <system file="a350-fuel"/>

    <propulsion>
        <engine file="trent_xwb-97">
            <feed>5</feed>
            <location unit="M">
                <x>25.1744</x>
                <y>-10.3684</y>
                <z>-1.3916</z>
            </location>
            <orient unit="DEG">
                <roll>0.0</roll>
                <pitch>0.0</pitch>
                <yaw>0.0</yaw>
            </orient>
            <thruster file="direct">
                <location unit="M">
                    <x>30.0419</x>
                    <y>-10.3684</y>
                    <z>-1.3916</z>
                </location>
                <orient unit="DEG">
                    <roll> 0.0 </roll>
                    <pitch>0.0</pitch>
                    <yaw>0.0</yaw>
                </orient>
            </thruster>
        </engine>

        <engine file="trent_xwb-97">
            <feed>6</feed>
            <location unit="M">
                <x>25.1744</x>
                <y>10.3658</y>
                <z>-1.3916</z>
            </location>
            <orient unit="DEG">
                <roll>0.0</roll>
                <pitch>0.0</pitch>
                <yaw>0.0</yaw>
            </orient>
            <thruster file="direct">
                <location unit="M">
                    <x>30.0419</x>
                    <y>10.3658</y>
                    <z>-1.3916</z>
                </location>
                <orient unit="DEG">
                    <roll>0.0</roll>
                    <pitch>0.0</pitch> <!-- 2.2, -1-->
                    <yaw>0.0</yaw>
                </orient>
            </thruster>
        </engine>

        <engine file="hgt1700">
            <feed>7</feed>
            <location unit="M">
                <x>64.1570</x>
                <y>0</y>
                <z>2.7153</z>
            </location>
            <orient unit="DEG">
                <roll>0.0</roll>
                <pitch>0.0</pitch>
                <yaw>0.0</yaw>
            </orient>
            <thruster file="direct">
                <location unit="M">
                    <x>64.1570</x>
                    <y>0</y>
                    <z>2.7153</z>
                </location>
                <orient unit="DEG">
                    <roll>0.0</roll>
                    <pitch>0.0</pitch>
                    <yaw>0.0</yaw>
                </orient>
            </thruster>
        </engine>

        <tank type="FUEL">
            <!-- Left Wing Tank -->
            <location unit="M">
                <x>35.2499</x>
                <y>-15.5634</y>
                <z>1.54771</z>
            </location>
            <capacity unit="LBS">53632</capacity>
            <contents unit="LBS">25450</contents>
            <priority>1</priority>
            <type>JET-A1</type>
            <temperature>50</temperature>
        </tank>

        <tank type="FUEL">
            <!-- Left Collector Tank -->
            <location unit="M">
                <x>32.0834</x>
                <y>-6.9772</y>
                <z>0.4442</z>
            </location>
            <capacity unit="LBS">3970</capacity>
            <contents unit="LBS">3970</contents>
            <standpipe unit="LBS">31</standpipe>
            <!-- minimun fuel on pipes -->
            <priority>1</priority>
            <type>JET-A1</type>
            <temperature>50</temperature>
        </tank>

        <tank type="FUEL">
            <!-- Center Tank -->
            <location unit="M">
                <x>28.0862</x>
                <y>0</y>
                <z>-1.2012</z>
            </location>
            <capacity unit="LBS">172900</capacity>
            <contents unit="LBS">64000</contents>
            <standpipe unit="LBS">43</standpipe>
            <!-- minimun fuel on pipes -->
            <priority>1</priority>
            <type>JET-A1</type>
            <temperature>50</temperature>
        </tank>

        <tank type="FUEL">
            <!-- Right Wing Tank -->
            <location unit="M">
                <x>35.0041</x>
                <y>15.5597</y>
                <z>1.5457</z>
            </location>
            <capacity unit="LBS">53632</capacity>
            <contents unit="LBS">25450</contents>
            <standpipe unit="LBS">43</standpipe>
            <priority>1</priority>
            <type>JET-A1</type>
            <temperature>50</temperature>
        </tank>

        <tank type="FUEL">
            <!-- Right Collector Tank -->
            <location unit="M">
                <x>32.1546</x>
                <y>7.0817</y>
                <z>0.4748</z>
            </location>
            <capacity unit="LBS">3970</capacity>
            <contents unit="LBS">3970</contents>
            <standpipe unit="LBS">31</standpipe>
            <!-- minimun fuel on pipes -->
            <priority>1</priority>
            <type>JET-A1</type>
            <temperature>50</temperature>
        </tank>

        <tank type="FUEL">
            <!-- Left Fuel Pipes (Engine 1 feed) -->
            <location unit="M">
                <x>27.4574</x>
                <y>10.3658</y>
                <z>0.3371</z>
            </location>
            <capacity unit="LBS">10</capacity>
            <contents unit="LBS">0</contents>
            <priority>1</priority>
            <type>JET-A1</type>
        </tank>

        <tank type="FUEL">
            <!-- Right Fuel Pipes (Engine 2 feed) -->
            <location unit="M">
                <x>27.4574</x>
                <y>-10.3684</y>
                <z>0.3371</z>
            </location>
            <capacity unit="LBS">10</capacity>
            <contents unit="LBS">0</contents>
            <priority>1</priority>
            <type>JET-A1</type>
        </tank>

        <tank type="FUEL">
            <!-- APU Fuel Pipes (APU feed) -->
            <location unit="M">
                <x>62.1109</x>
                <y>0</y>
                <z>2.7153</z>
            </location>
            <capacity unit="LBS">5</capacity>
            <contents unit="LBS">0</contents>
            <priority>1</priority>
            <type>JET-A1</type>
        </tank>
    </propulsion>

</fdm_config>
